β := 3500
W31 := 360
W32 := 40
W21 := 67
h := 6.62*10^-34
c := 3*10^8
σa_pump := 1*10^-24
N := 4*10^26
n := 1.7
λp := 793*10^-9
λg := 1.98*10^-6
σe_gen := 0.25*10^-24
σa_gen := 0.04*10^-24
P := 72*0.9
d := 0.8*10^-3
αi := 1
βj := 0.2
L := 0.15
l := 0.015
Le := L + (n - 1)*l
Le = 0.1605
Va := π*d^2/4*l
Va = 7.53982e-9
γ1 := -ln(1 - 0.005)
γ1 = 0.00501254
V := Le/l*Va
V = 8.06761e-8
γ2 := -ln(1 - 0.2)
γ2 = 0.223144
γi := -ln(1 - exp(-1/(σa_gen*N*l)))
γi = 0.0156253
Be := αi*c/V*σe_gen
Be = 9.29643e-10
Ba := βj*c/V*σa_gen
Ba = 2.97486e-11
ρ := c/Le*(γi + (γ1 + γ2)/2)
ρ = 242436153
K := 1.0*λp*P*σa_pump*4/(h*c*π*d^2)
K = 514.753
K := λp*P*4/(N*l*h*c*π*d^2)
K = 85.7922
# <--- n3  <->  y0
# <--- n2  <->  y1
F(t, y) := [
    K*y[2] - β*y[2]*y[0] - (W31 + W32)*y[0];
    2*β*y[2]*y[0] + W32*y[0] - W21*y[1] - y[3]*(Be*y[1] - Ba*y[2]);
    -β*y[2]*y[0] - K*y[2] + W31*y[0] + W21*y[1] + y[3]*(Be*y[1] - Ba*y[2]);
    N*Va*y[3]*(Be*y[1] - Ba*y[2]) - y[3]*ρ
]  # <--- n1  <->  y2
# <--- q  <->  y3
y0 := [0; 0; 1; 1]
M := 10020
t0 := 0
t1 := 0.03
u := Rkadapt(y0, t0, t1, M, F)
t := u[:, 0]
n1 := u[:, 3]
n2 := u[:, 2]
n3 := u[:, 1]
q := γ2*c/(2*Le)*h*c/λg*u[:, 4]
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Pout := (γ2*c/(2*Le)*h*c/λg*u[:, 4][9968])
Pout = 32.3161
mean(q) = 30.856
u =  # no stored result
